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/batch
! ANSYS input file written by Workbench version 2026 R1
! File used for geometry attach: C:\Users\tejas\AppData\Local\Temp\WB_tejas_23920_2\wbnew_files\dp0\SYS-1\DM\SYS-1.dsco
/title,wbnew--Steady-State Thermal (B5)
/com,--- Data in consistent MKS units. See Solving Units in the help system for more information.
/units,MKS
/prep7
! Turn off shape checking because checks already performed inside WB mesher.
! See help system for more information.
SHPP,OFF,,NOWARN
etcon,set             ! allow ANSYS to choose best KEYOP's for 180x elements, resets any applicable keyopt to MAPDL defaults
/com,*********** Send User Defined Coordinate System(s) ***********
csys,0
/com,*********** Nodes for the whole assembly ***********
nblock,3,,8035
(1i9,3e20.9e3)
        1     1.500000000E-03     2.500000000E-02     5.500000000E-02
        2     2.000000000E-02     2.500000000E-02     5.500000000E-02
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-1
/com,*********** Elements for Body 1 'SYS-1\Open CASCADE STEP translator 7.9 1' ***********
et,1,291
MAT,1 $ TYPE,1 $ REAL,1 $ SECNUM,1 $ ESYS,0    ! ELEMNODES = 10
eblock,21,COMPACT,,3847
(21i9)
        1      223     1039     1118     1115     2831     6974     2833     2832     6973     7154
        2      239     1118      241      837     2964     2990     2958     2961     6240     2988
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-1
secnum,1    ! reset the section ID to default
toffst,273.15,      ! Temperature offset from absolute zero
/com,*********** Send Materials ***********
Temperature = 'TEMP' ! Temperature
MP,DENS,1,7850,	! kg m^-3
MP,ALPX,1,1.2e-05,	! C^-1
MP,C,1,434,	! J kg^-1 C^-1
MP,KXX,1,60.5,	! W m^-1 C^-1
MP,RSVX,1,1.7e-07,	! kg m^3 A^-2 s^-3
MP,EX,1,200000000000,	! Pa
MP,NUXY,1,0.3,
MP,MURX,1,10000,

!************************* Model Summary ********************
! SYS-1\Open CASCADE STEP translator 7.9 1,	Structural Steel,	matid,	1
!************************* End Model Summary ********************
/com,*********** Create "Heat Flux" ***********
et,2,152
MAT,2 $ TYPE,2 $ REAL,2 $ SECNUM,2 $ ESYS,0    ! ELEMNODES = 8
eblock,21,COMPACT,,6
(21i9)
     5850     1215      176     1200     1200     2433     2432     1200     7297
     5851      181     1223        2        2     2473     1246        2     1235
     5852        2     1223     1227     1227     1246     7305     1227     1247
     5853      176       40     1200     1200     1582     1604     1200     2432
     5854     1223     1215     1200     1200     7303     7297     1200     7299
     5855     1223     1200     1227     1227     7299     7300     1227     7305
-1
secnum,1    ! reset the section ID to default
esel,s,type,,2
keyop,2,8,1         ! include heat flux
esel,all
fcum,add                   ! add nodal forces up (needed in case have loads on the same edge,vertex)
fcum                       ! reset default on fcum command since done sending WB F loads
/com,*********** Create "Convection" ***********
et,3,152
MAT,3 $ TYPE,3 $ REAL,3 $ SECNUM,3 $ ESYS,0    ! ELEMNODES = 8
eblock,21,COMPACT,,684
(21i9)
     5856      357      692      942      942     3834     5646      942     3837
     5857      527      528      942      942     4843     4853      942     4847
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-1
secnum,1    ! reset the section ID to default
esel,s,type,,3
keyop,3,8,2
keyop,3,13,0
esel,all
/com,***************** Define Uniform Initial temperature ***************
tunif,22.
fini
/com,****************************************************************************
/com,*************************    SOLUTION       ********************************
/com,****************************************************************************
/solu
antype,0                   ! static analysis
!eqsl,sparse               ! using sparse solver which is default so no eqsl command needed
cntr,print,1               ! print out contact info and also make no initial contact an error
cncheck,dmp		!	Enable program controlled contact splitting for distributed memory parallel run
rescontrol,,none                 ! Do not keep any restart files
dmpoption,emat,no             ! Don't combine emat file for DANSYS
dmpoption,esav,no             ! Don't combine esav file for DANSYS
/com,****************************************************
/com,******************* SOLVE FOR LS 1 OF 1 ****************
esel,s,type,,2
nsle
sf,all,hflux,200000.
nsel,all
esel,all
esel,s,type,,3
nsle
sf,all,conv,50.,25.
nsel,all
esel,all
autots,on
nsub,1,10,1
time,1.
outres,erase
outres,all,none
outres,nsol,all
outres,rsol,all
outres,eangl,all
outres,veng,all
outres,fflux,all,
outres,cont,all,
esel,s,type,,3
cm,_elmisc,elem
esel,all
outres,misc,all,_elmisc
cnvtol,heat,,1.e-003,,1.e-006 ! Program Controlled. Set MINREF equivalent of 1e-6 Watts
! *********** WB SOLVE COMMAND ***********
! check interactive state
*get,ANSINTER_,active,,int
*if,ANSINTER_,ne,0,then
/eof
*endif
solve
/com *************** Write FE CONNECTORS *********
CEWRITE,file,ce,,INTE
/com,****************************************************
/com,*************** FINISHED SOLVE FOR LS 1 *************
fini
/post1
fini
